# EJERCICIO 01_ ULIANOV SABATH CUBA VALENCIA
# 01. DIAGRAMA DE CUERPO LIBRE DCL
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# 02. CALCULO DE REACCIONES
sum(F_y) == 0
sum(M_a) == 0
B_y := -700*7*0.5 - 6000*6 + B_y*10 - 3000*14 - 450 == 0 solve, B_y → 8090.0
A_y := -700*7 + A_y - 6000 + B_y - 3000 == 0 solve, A_y → 5810.0
A_y = 5810
# 03. GRAFICAS DE CORTANTE Y MOMENTO
B_y = 8090
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V(x) := -700*x + 700*(x - 7)*(x ≥ 7) + A_y*(x ≥ 3) - 6000*(x ≥ 9) + B_y*(x ≥ 13) - 3000*(x ≥ 17)
M(x) := -700*(x^2/2) + 700*(x - 7)^2/2*(x ≥ 7) + A_y*(x - 3)*(x ≥ 3) - 6000*(x - 9)*(x ≥ 9) + B_y*(x - 13)*(x ≥ 13) - 3000*(x - 17)*(x ≥ 17) + 450
# INTERVALOS:
x := 0, 0.01 .. 17
# [plot: V(x) vs x]
# [plot: M(x) vs x]
