# RESOLUCION DE VIGAS ISOSTATICAS
# RESOLVER LA SIGUIENTE VIGA:
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q := 500
a := 2
c := 2
b := 4
L := a + b + c = 8
# 1°DIAGRAMA DE CUERPO LIBRE
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# 2° CALCULAR LAS REACCIONES
# SUMATORIA DE MOMENTOS EN EL PUNTO B
A_y := -(q*b)*(b/2 + c) + A_y*(a + b + c) == 0 solve, A_y → 1000
A_y = 1000
# SUMATORIA DE FUERZAS EN EL EJE Y
B_y := A_y - (q*b) + B_y == 0 solve, B_y → 1000
B_y = 1000
# 3° CALCULO DE MOMENTOS - Elaborar graficas de V y M por tramos o secciones
# Tramo entre 2<x<6
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V_2(x_2) := A_y - V_2 - (q*(x_2 - a)) == 0 solve, V_2 → -(500*x_2) + 2000
M_2(x_2) := M_2 - A_y*x_2 + q*(x_2 - a^2)/2 == 0 solve, M_2 → 750*x_2 + 1000
# Tramo entre 6<x<8
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V_3(x_3) := A_y - V_3 - (q*b) == 0 solve, V_3 → -1000
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M_3(x_3) := M_3 - A_y*x_3 + (q*b)*(x_3 - a - b/2) == 0 solve, M_3 → -(1000*x_3) + 8000
# Tramo entre 0<x<2
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V_1(x_1) := A_y - V_1 == 0 solve, V_1 → 1000
M_1(x_1) := M_1 - A_y*x_1 == 0 solve, M_1 → 1000*x_1
# Elaborar graficas de V y M
x_1 := 0, 0.01 .. a
x_2 := a, a + 0.01 .. (a + b)
x_3 := a + b, a + b + 0.01 .. L
# [plot: V_1(x_1), V_2(x_2), V_3(x_3) vs x_1, x_2, x_3]
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