L_1 := 4 m
L_2 := 7.5 m
L_3 := 0 m
L_4 := 0 m
L_5 := 0 m
L_6 := 0 m
L_7 := 0 m
L_8 := 0 m
L_9 := 0 m
L_10 := 0 m
x_0 := 0.0 m
x_1 := L_1
x_2 := x_1 + L_2
x_3 := x_2 + L_3
x_4 := x_3 + L_4
x_5 := x_4 + L_5
x_6 := x_5 + L_6
x_7 := x_6 + L_7
x_8 := x_7 + L_8
x_9 := x_8 + L_9
x_10 := x_9 + L_10
L_tot := x_10
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q_1 := 1500 kg/m
q_2 := 900 kg/m
q_3 := 0 kg/m
q_4 := 0 kg/m
q_5 := 0 kg/m
q_6 := 0 kg/m
q_7 := 0 kg/m
q_8 := 0 kg/m
q_9 := 0 kg/m
q_10 := 0 kg/m
P_0 := 0 kg
P_1 := 400 kg
P_2 := 0 kg
P_3 := 0 kg
P_4 := 0 kg
P_5 := 0 kg
P_6 := 0 kg
P_7 := 0 kg
P_8 := 0 kg
P_9 := 0 kg
P_10 := 0 kg
M_0 := 0*(kg*m)
M_1 := 0*(kg*m)
M_2 := 150*(kg*m)
M_3 := 0*(kg*m)
M_4 := 0*(kg*m)
M_5 := 0*(kg*m)
M_6 := 0*(kg*m)
M_7 := 0*(kg*m)
M_8 := 0*(kg*m)
M_9 := 0*(kg*m)
M_10 := 0*(kg*m)
V_D := 35.0000 kg
V_A := 23.0000 kg
M(x) := V_A*x + (x ≥ x_1)*V_D*(x - x_1) - (x_1 > x > x_0)*q_1*x^2/2 - (x ≥ x_1)*q_1*L_1*(x - L_1/2) - (x_2 > x > x_1)*q_2*(x - x_1)^2/2 - (x ≥ x_2)*q_2*L_2*(x - (x_1 + L_2/2)) + (x ≥ x_2)*M_2 - (x ≥ x_1)*P_1*(x - x_1)
Q(x) := V_A + (x ≥ x_1)*V_D - (x_1 > x > x_0)*q_1*x - (x ≥ x_1)*q_1*L_1 - (x_2 > x > x_1)*q_2*(x - x_1) - (x ≥ x_2)*q_2*L_2 - (x ≥ x_1)*P_1
x := 0.0 m, 0.001 m .. L_tot
# [plot: Q(x) vs x]
# [plot: M(x) vs x]
