L_1 := 3 m
L_2 := 4 m
L_3 := 3.5 m
L_4 := 4.5 m
L_5 := 3 m
L_6 := 4 m
L_7 := 3.5 m
L_8 := 4.5 m
L_9 := 3 m
L_10 := 4 m
x_0 := 0.0 m
x_1 := L_1
x_2 := x_1 + L_2
x_3 := x_2 + L_3
x_4 := x_3 + L_4
x_5 := x_4 + L_5
x_6 := x_5 + L_6
x_7 := x_6 + L_7
x_8 := x_7 + L_8
x_9 := x_8 + L_9
x_10 := x_9 + L_10
L_tot := x_10
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q_1 := 750 kg/m
q_2 := 750 kg/m
q_3 := 750 kg/m
q_4 := 750 kg/m
q_5 := 750 kg/m
q_6 := 750 kg/m
q_7 := 750 kg/m
q_8 := 750 kg/m
q_9 := 750 kg/m
q_10 := 750 kg/m
P_0 := 0 kg
P_1 := 200 kg
P_2 := 0 kg
P_3 := 200 kg
P_4 := 0 kg
P_5 := 200 kg
P_6 := 0 kg
P_7 := 200 kg
P_8 := 0 kg
P_9 := 200 kg
P_10 := 0 kg
M_0 := 50*(kg*m)
M_1 := 0*(kg*m)
M_2 := 0*(kg*m)
M_3 := 0*(kg*m)
M_4 := 0*(kg*m)
M_5 := 0*(kg*m)
M_6 := 0*(kg*m)
M_7 := 0*(kg*m)
M_8 := 0*(kg*m)
M_9 := 0*(kg*m)
M_10 := 50*(kg*m)
V_D := 35.0000 kg
V_A := 23.0000 kg
M(x) := V_A*x + (x ≥ x_5)*V_D*(x - x_5) - (x_1 > x > x_0)*q_1*x^2/2 - (x ≥ x_1)*q_1*L_1*(x - L_1/2) - (x_2 > x > x_1)*q_2*(x - x_1)^2/2 - (x ≥ x_2)*q_2*L_2*(x - (x_1 + L_2/2)) - (x_3 > x > x_2)*q_3*(x - x_2)^2/2 - (x ≥ x_3)*q_3*L_3*(x - (x_2 + L_3/2)) - (x_4 > x > x_3)*q_4*(x - x_3)^2/2 - (x ≥ x_4)*q_4*L_4*(x - (x_3 + L_4/2)) - (x_5 > x > x_4)*q_5*(x - x_4)^2/2 - (x ≥ x_5)*q_5*L_5*(x - (x_4 + L_5/2)) - (x_6 > x > x_5)*q_6*(x - x_5)^2/2 - (x ≥ x_6)*q_6*L_6*(x - (x_5 + L_6/2)) - (x_7 > x > x_6)*q_7*(x - x_6)^2/2 - (x ≥ x_7)*q_7*L_7*(x - (x_6 + L_7/2)) - (x_8 > x > x_7)*q_8*(x - x_7)^2/2 - (x ≥ x_8)*q_8*L_8*(x - (x_7 + L_8/2)) - (x_9 > x > x_8)*q_9*(x - x_8)^2/2 - (x ≥ x_9)*q_9*L_9*(x - (x_8 + L_9/2)) - (x_10 > x > x_9)*q_10*(x - x_9)^2/2 - (x ≥ x_10)*q_10*L_10*(x - (x_9 + L_10/2)) + M_0 + (x ≥ x_10)*M_10 - (x ≥ x_1)*P_1*(x - x_1) - (x ≥ x_3)*P_3*(x - x_3) - (x ≥ x_5)*P_5*(x - x_5) - (x ≥ x_7)*P_7*(x - x_7) - (x ≥ x_9)*P_9*(x - x_9)
Q(x) := V_A + (x ≥ x_5)*V_D - (x_1 > x > x_0)*q_1*x - (x ≥ x_1)*q_1*L_1 - (x_2 > x > x_1)*q_2*(x - x_1) - (x ≥ x_2)*q_2*L_2 - (x_3 > x > x_2)*q_3*(x - x_2) - (x ≥ x_3)*q_3*L_3 - (x_4 > x > x_3)*q_4*(x - x_3) - (x ≥ x_4)*q_4*L_4 - (x_5 > x > x_4)*q_5*(x - x_4) - (x ≥ x_5)*q_5*L_5 - (x_6 > x > x_5)*q_6*(x - x_5) - (x ≥ x_6)*q_6*L_6 - (x_7 > x > x_6)*q_7*(x - x_6) - (x ≥ x_7)*q_7*L_7 - (x_8 > x > x_7)*q_8*(x - x_7) - (x ≥ x_8)*q_8*L_8 - (x_9 > x > x_8)*q_9*(x - x_8) - (x ≥ x_9)*q_9*L_9 - (x_10 > x > x_9)*q_10*(x - x_9) - (x ≥ x_10)*q_10*L_10 - (x ≥ x_1)*P_1 - (x ≥ x_3)*P_3 - (x ≥ x_5)*P_5 - (x ≥ x_7)*P_7 - (x ≥ x_9)*P_9
x := 0.0 m, 0.001 m .. L_tot
# [plot: Q(x) vs x]
# [plot: M(x) vs x]
